// SBML level 2 version 1
// Aqui se van a deifinir las ecuaciones diferenciales ordinales. En realidad solo se escribe la comunicacion mixta. Despues, cambiando algunos parametros llegamos a la indirecta o la directa
// En este codigo, la e, s y d tienen valores que van a ser sobreescritos por el archivo de adhesionComunicacionSteppables.py, al igual que Ivec, Imul y Iext

model cell()

  // Compartments:
  compartment compartment = 1;

  // Species:
  species $X in compartment = 1;
  species I in compartment = 1.25;
  species A in compartment = 2.126606e-12;
  species Ivec in compartment = 5;
  species Imul in compartment = 2;
  species Iext in compartment = 1;

  // Parameters:
  k1 = 0.004;
  k2 = 0.005;
  k3 = 0.005;
  k4 = 0.006;
  d = 0.009;
  e = 0.009;
  s = 0.009;

  // Reactions:
  J0: $X => A; k1*A*A*X/I;
  J1: $X => I; k3*A*A + d*Ivec + e*Iext;
  J2: A => $X; k2*A;
  J3: I => $X; k4*I + d*Imul + s*I;
end
